<neuroml xmlns="http://www.neuroml.org/schema/neuroml2"  xmlns:xs="http://www.w3.org/2001/XMLSchema" xmlns:xsi="http://www.w3.org/2001/XMLSchema-instance" xsi:schemaLocation="http://www.neuroml.org/schema/neuroml2 https://raw.github.com/NeuroML/NeuroML2/development/Schemas/NeuroML2/NeuroML_v2.3.1.xsd" id="IClamp_AVAL">
    <notes>Generated by NeuroMLlite v0.6.1
    Generated network: IClamp_AVAL
    Generation seed: 1234</notes>
    <include href="AVAL.cell.nml"/>
    <pulseGenerator id="iclamp_stim_min30" delay="100ms" duration="1000ms" amplitude="-30pA"/>
    <pulseGenerator id="iclamp_stim_min20" delay="100ms" duration="1000ms" amplitude="-20pA"/>
    <pulseGenerator id="iclamp_stim_min10" delay="100ms" duration="1000ms" amplitude="-10pA"/>
    <pulseGenerator id="iclamp_stim_0" delay="100ms" duration="1000ms" amplitude="0pA"/>
    <pulseGenerator id="iclamp_stim_10" delay="100ms" duration="1000ms" amplitude="10pA"/>
    <pulseGenerator id="iclamp_stim_20" delay="100ms" duration="1000ms" amplitude="20pA"/>
    <pulseGenerator id="iclamp_stim_30" delay="100ms" duration="1000ms" amplitude="30pA"/>
    <network id="IClamp_AVAL" type="networkWithTemperature" temperature="6.3degC">
        <notes>A network model: IClamp_AVAL</notes>
        <property tag="recommended_dt_ms" value="0.025"/>
        <property tag="recommended_duration_ms" value="1500.0"/>
        <population id="pop_AVAL" component="AVAL" size="7" type="populationList">
            <property tag="region" value="Worm"/>
            <instance id="0">
                <location x="966.453535692138757" y="44.073259917535268" z="7.491470058587191"/>
            </instance>
            <instance id="1">
                <location x="910.975962449124154" y="93.926899736376399" z="582.227573058949133"/>
            </instance>
            <instance id="2">
                <location x="671.563481487985086" y="8.393822683708397" z="766.480932791796249"/>
            </instance>
            <instance id="3">
                <location x="236.809775363117751" y="3.081402172660996" z="788.772717236283484"/>
            </instance>
            <instance id="4">
                <location x="346.088965597123092" y="62.328147503916853" z="615.815695103615212"/>
            </instance>
            <instance id="5">
                <location x="148.55463870828757" y="18.309064740993165" z="114.412969688687639"/>
            </instance>
            <instance id="6">
                <location x="14.618780486909122" y="48.675154060475833" z="964.901560916215658"/>
            </instance>
        </population>
        <inputList id="input_iclamp_stim_min30" population="pop_AVAL" component="iclamp_stim_min30">
            <input id="0" target="../pop_AVAL/0/AVAL" destination="synapses"/>
        </inputList>
        <inputList id="input_iclamp_stim_min20" population="pop_AVAL" component="iclamp_stim_min20">
            <input id="0" target="../pop_AVAL/1/AVAL" destination="synapses"/>
        </inputList>
        <inputList id="input_iclamp_stim_min10" population="pop_AVAL" component="iclamp_stim_min10">
            <input id="0" target="../pop_AVAL/2/AVAL" destination="synapses"/>
        </inputList>
        <inputList id="input_iclamp_stim_0" population="pop_AVAL" component="iclamp_stim_0">
            <input id="0" target="../pop_AVAL/3/AVAL" destination="synapses"/>
        </inputList>
        <inputList id="input_iclamp_stim_10" population="pop_AVAL" component="iclamp_stim_10">
            <input id="0" target="../pop_AVAL/4/AVAL" destination="synapses"/>
        </inputList>
        <inputList id="input_iclamp_stim_20" population="pop_AVAL" component="iclamp_stim_20">
            <input id="0" target="../pop_AVAL/5/AVAL" destination="synapses"/>
        </inputList>
        <inputList id="input_iclamp_stim_30" population="pop_AVAL" component="iclamp_stim_30">
            <input id="0" target="../pop_AVAL/6/AVAL" destination="synapses"/>
        </inputList>
    </network>
</neuroml>
